*Heading
** Job name: Extension55 Model name: Active_extension
** Generated by: Abaqus/CAE 2025
*Preprint, echo=NO, model=NO, history=NO, contact=NO
**
** PARTS
**
*Part, name=Bottom
*Node
      1,        20.75,          10.,           0.
      2,        20.75,           9.,           0.
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*Element, type=R3D3
 1,  1, 46,  2
 2, 46, 88,  2
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*Node
    452,           0.,          10.,           0.
*Nset, nset=Bottom-RefPt_, internal
452,
*Elset, elset=Bottom, generate
   1,  837,    1
*End Part
**
*Part, name=Top
*Node
      1,        20.75,          10.,           0.
      2,        20.75,           9.,           0.
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*Element, type=R3D3
 1,  1, 46,  2
 2, 46, 88,  2
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*Node
    452,           0.,          10.,           0.
*Nset, nset=Top-RefPt_, internal
452,
*Elset, elset=Top, generate
   1,  837,    1
*End Part
**
*Part, name=shell_editCap
*Node
      1,           0.,           0.,   68.6999969
      2,        -1.75,           0.,   66.9499969
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*Element, type=S4R
  1,    1,   69, 4695,  200
  2,   69,   70, 4696, 4695
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*Element, type=S3
9359, 3560, 3217, 3216
9360, 3538, 3194, 3193
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*Nset, nset=_PickedSet2, internal, generate
     1,  16476,      1
*Elset, elset=_PickedSet2, internal, generate
     1,  16376,      1
** Section: Bellows
*Shell Section, elset=_PickedSet2, material=BBDINO30
1.5, 5
*End Part
**
**
** ASSEMBLY
**
*Assembly, name=Assembly
**
*Instance, name=shell_editCap-1, part=shell_editCap
       20.75,     69.98305,           0.
       20.75,     69.98305,           0.,        21.75,     69.98305,           0.,          90.
*End Instance
**
*Instance, name=Top-1, part=Top
          0.,      53.5261,           0.
*End Instance
**
*Instance, name=Bottom-1, part=Bottom
          0.,         2.54,           0.
          0.,         2.54,           0.,           0.,         2.54,           1.,         180.
*End Instance
**
*Nset, nset=BottomRimBellows, instance=shell_editCap-1
   25,   26, 1629, 1630, 1631, 1632
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*Elset, elset=BottomRimBellows, instance=shell_editCap-1
  2341,  2342,  2343,  2344,  2345,  2346
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*Nset, nset=BottomRimCap, instance=Bottom-1
  2, 47, 48, 49, 50, 51
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*Elset, elset=BottomRimCap, instance=Bottom-1, generate
  2,  86,   2
*Nset, nset=RF, instance=Top-1
 452,
*Nset, nset=TopRimBellows, instance=shell_editCap-1
   67,   68, 3305, 3306, 3307, 3308
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*Elset, elset=TopRimBellows, instance=shell_editCap-1
 8475, 8476, 8477, 8478, 8479, 8480
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*Nset, nset=TopRimCap, instance=Top-1
  2, 47, 48, 49, 50, 51
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*Elset, elset=TopRimCap, instance=Top-1, generate
  2,  86,   2
*Nset, nset=_PickedSet39, internal, instance=Bottom-1
 452,
*Elset, elset=_BellowsInner_SNEG, internal, instance=shell_editCap-1, generate
     1,  16376,      1
*Surface, type=ELEMENT, name=BellowsInner
_BellowsInner_SNEG, SNEG
*Elset, elset=_BellowsOuter_SPOS, internal, instance=shell_editCap-1, generate
     1,  16376,      1
*Surface, type=ELEMENT, name=BellowsOuter
_BellowsOuter_SPOS, SPOS
*Elset, elset=_Bottom_SNEG, internal, instance=Bottom-1, generate
 450,  837,    1
*Surface, type=ELEMENT, name=Bottom
_Bottom_SNEG, SNEG
*Elset, elset=_Top_SNEG, internal, instance=Top-1, generate
 450,  837,    1
*Surface, type=ELEMENT, name=Top
_Top_SNEG, SNEG
*Elset, elset=_TopandBottom_SNEG, internal, instance=Top-1, generate
 450,  837,    1
*Elset, elset=_TopandBottom_SNEG, internal, instance=Bottom-1, generate
 450,  837,    1
*Surface, type=ELEMENT, name=TopandBottom
_TopandBottom_SNEG, SNEG
*Surface, type=NODE, name=BottomRimCap_CNS_, internal
BottomRimCap, 1.
*Surface, type=NODE, name=BottomRimBellows_CNS_, internal
BottomRimBellows, 1.
*Surface, type=NODE, name=TopRimCap_CNS_, internal
TopRimCap, 1.
*Surface, type=NODE, name=TopRimBellows_CNS_, internal
TopRimBellows, 1.
*Rigid Body, ref node=Top-1.Top-RefPt_, elset=Top-1.Top
*Rigid Body, ref node=Bottom-1.Bottom-RefPt_, elset=Bottom-1.Bottom
** Constraint: BottomTie
*Tie, name=BottomTie, adjust=yes, position tolerance=0.
BottomRimBellows_CNS_, BottomRimCap_CNS_
** Constraint: TopTie
*Tie, name=TopTie, adjust=yes, position tolerance=0.
TopRimBellows_CNS_, TopRimCap_CNS_
*End Assembly
**
** MATERIALS
**
*Material, name=BBDINO30
*Density
 1.06e-09,
*Hyperelastic, mooney-rivlin
 0.090793, 0.009588,       0.
*Material, name=Rigid
*Elastic
 1e+10, 0.3
**
** INTERACTION PROPERTIES
**
*Surface Interaction, name=Self-contact
1.,
*Friction, slip tolerance=0.005
 0.2,
*Surface Behavior, pressure-overclosure=HARD
**
** BOUNDARY CONDITIONS
**
** Name: BottomFix Type: Symmetry/Antisymmetry/Encastre
*Boundary
_PickedSet39, ENCASTRE
**
** INTERACTIONS
**
** Interaction: Self-contact
*Contact Pair, interaction=Self-contact, type=SURFACE TO SURFACE
BellowsOuter,
** ----------------------------------------------------------------
**
** STEP: Compression
**
*Step, name=Compression, nlgeom=YES, inc=1500
*Static
0.01, 1., 1e-05, 0.05
**
** BOUNDARY CONDITIONS
**
** Name: Extension Type: Displacement/Rotation
*Boundary
RF, 1, 1
RF, 2, 2, 55.
RF, 3, 3
RF, 4, 4
RF, 5, 5
RF, 6, 6
**
** OUTPUT REQUESTS
**
*Restart, write, frequency=0
**
** FIELD OUTPUT: F-Output-1
**
*Output, field
*Node Output, variable=PRESELECT
*Element Output, directions=YES, variable=PRESELECT
**
** HISTORY OUTPUT: Internal energy
**
*Output, history
*Energy Output
ALLIE,
**
** HISTORY OUTPUT: DisplacementForce
**
*Node Output, nset=RF
RF2, U2
*End Step
** ----------------------------------------------------------------
**
** STEP: P1
**
*Step, name=P1, nlgeom=YES, inc=5000
*Static
0.01, 1., 1e-05, 0.05
**
** LOADS
**
** Name: P1   Type: Pressure
*Dsload, op=NEW
BellowsInner, P, 0.001
**
** OUTPUT REQUESTS
**
*Restart, write, frequency=0
**
** FIELD OUTPUT: F-Output-1
**
*Output, field
*Node Output, variable=PRESELECT
*Element Output, directions=YES, variable=PRESELECT
**
** HISTORY OUTPUT: Internal energy
**
*Output, history
*Energy Output
ALLIE,
**
** HISTORY OUTPUT: DisplacementForce
**
*Node Output, nset=RF
RF2, U2
*End Step
** ----------------------------------------------------------------
**
** STEP: P2
**
*Step, name=P2, nlgeom=YES, inc=5000
*Static
0.01, 1., 1e-05, 0.05
**
** LOADS
**
** Name: P1   Type: Pressure
*Dsload, op=NEW
** Name: P2   Type: Pressure
*Dsload, op=NEW
BellowsInner, P, 0.002
**
** OUTPUT REQUESTS
**
*Restart, write, frequency=0
**
** FIELD OUTPUT: F-Output-1
**
*Output, field
*Node Output, variable=PRESELECT
*Element Output, directions=YES, variable=PRESELECT
**
** HISTORY OUTPUT: Internal energy
**
*Output, history
*Energy Output
ALLIE,
**
** HISTORY OUTPUT: DisplacementForce
**
*Node Output, nset=RF
RF2, U2
*End Step
** ----------------------------------------------------------------
**
** STEP: P3
**
*Step, name=P3, nlgeom=YES, inc=5000
*Static
0.01, 1., 1e-05, 0.05
**
** LOADS
**
** Name: P2   Type: Pressure
*Dsload, op=NEW
** Name: P3   Type: Pressure
*Dsload, op=NEW
BellowsInner, P, 0.003
**
** OUTPUT REQUESTS
**
*Restart, write, frequency=0
**
** FIELD OUTPUT: F-Output-1
**
*Output, field
*Node Output, variable=PRESELECT
*Element Output, directions=YES, variable=PRESELECT
**
** HISTORY OUTPUT: Internal energy
**
*Output, history
*Energy Output
ALLIE,
**
** HISTORY OUTPUT: DisplacementForce
**
*Node Output, nset=RF
RF2, U2
*End Step
** ----------------------------------------------------------------
**
** STEP: P4
**
*Step, name=P4, nlgeom=YES, inc=5000
*Static
0.01, 1., 1e-05, 0.05
**
** LOADS
**
** Name: P3   Type: Pressure
*Dsload, op=NEW
** Name: P4   Type: Pressure
*Dsload, op=NEW
BellowsInner, P, 0.004
**
** OUTPUT REQUESTS
**
*Restart, write, frequency=0
**
** FIELD OUTPUT: F-Output-1
**
*Output, field
*Node Output, variable=PRESELECT
*Element Output, directions=YES, variable=PRESELECT
**
** HISTORY OUTPUT: Internal energy
**
*Output, history
*Energy Output
ALLIE,
**
** HISTORY OUTPUT: DisplacementForce
**
*Node Output, nset=RF
RF2, U2
*End Step
** ----------------------------------------------------------------
**
** STEP: P5
**
*Step, name=P5, nlgeom=YES, inc=5000
*Static
0.01, 1., 1e-05, 0.05
**
** LOADS
**
** Name: P4   Type: Pressure
*Dsload, op=NEW
** Name: P5   Type: Pressure
*Dsload, op=NEW
BellowsInner, P, 0.005
**
** OUTPUT REQUESTS
**
*Restart, write, frequency=0
**
** FIELD OUTPUT: F-Output-1
**
*Output, field
*Node Output, variable=PRESELECT
*Element Output, directions=YES, variable=PRESELECT
**
** HISTORY OUTPUT: Internal energy
**
*Output, history
*Energy Output
ALLIE,
**
** HISTORY OUTPUT: DisplacementForce
**
*Node Output, nset=RF
RF2, U2
*End Step
** ----------------------------------------------------------------
**
** STEP: P6
**
*Step, name=P6, nlgeom=YES, inc=5000
*Static
0.01, 1., 1e-05, 0.05
**
** LOADS
**
** Name: P5   Type: Pressure
*Dsload, op=NEW
** Name: P6   Type: Pressure
*Dsload, op=NEW
BellowsInner, P, 0.006
**
** OUTPUT REQUESTS
**
*Restart, write, frequency=0
**
** FIELD OUTPUT: F-Output-1
**
*Output, field
*Node Output, variable=PRESELECT
*Element Output, directions=YES, variable=PRESELECT
**
** HISTORY OUTPUT: Internal energy
**
*Output, history
*Energy Output
ALLIE,
**
** HISTORY OUTPUT: DisplacementForce
**
*Node Output, nset=RF
RF2, U2
*End Step
** ----------------------------------------------------------------
**
** STEP: P7
**
*Step, name=P7, nlgeom=YES, inc=5000
*Static
0.01, 1., 1e-05, 0.05
**
** LOADS
**
** Name: P6   Type: Pressure
*Dsload, op=NEW
** Name: P7   Type: Pressure
*Dsload, op=NEW
BellowsInner, P, 0.007
**
** OUTPUT REQUESTS
**
*Restart, write, frequency=0
**
** FIELD OUTPUT: F-Output-1
**
*Output, field
*Node Output, variable=PRESELECT
*Element Output, directions=YES, variable=PRESELECT
**
** HISTORY OUTPUT: Internal energy
**
*Output, history
*Energy Output
ALLIE,
**
** HISTORY OUTPUT: DisplacementForce
**
*Node Output, nset=RF
RF2, U2
*End Step
** ----------------------------------------------------------------
**
** STEP: P8
**
*Step, name=P8, nlgeom=YES, inc=5000
*Static
0.01, 1., 1e-05, 0.05
**
** LOADS
**
** Name: P7   Type: Pressure
*Dsload, op=NEW
** Name: P8   Type: Pressure
*Dsload, op=NEW
BellowsInner, P, 0.008
**
** OUTPUT REQUESTS
**
*Restart, write, frequency=0
**
** FIELD OUTPUT: F-Output-1
**
*Output, field
*Node Output, variable=PRESELECT
*Element Output, directions=YES, variable=PRESELECT
**
** HISTORY OUTPUT: Internal energy
**
*Output, history
*Energy Output
ALLIE,
**
** HISTORY OUTPUT: DisplacementForce
**
*Node Output, nset=RF
RF2, U2
*End Step
** ----------------------------------------------------------------
**
** STEP: P9
**
*Step, name=P9, nlgeom=YES, inc=5000
*Static
0.01, 1., 1e-05, 0.05
**
** LOADS
**
** Name: P8   Type: Pressure
*Dsload, op=NEW
** Name: P9   Type: Pressure
*Dsload, op=NEW
BellowsInner, P, 0.009
**
** OUTPUT REQUESTS
**
*Restart, write, frequency=0
**
** FIELD OUTPUT: F-Output-1
**
*Output, field
*Node Output, variable=PRESELECT
*Element Output, directions=YES, variable=PRESELECT
**
** HISTORY OUTPUT: Internal energy
**
*Output, history
*Energy Output
ALLIE,
**
** HISTORY OUTPUT: DisplacementForce
**
*Node Output, nset=RF
RF2, U2
*End Step
** ----------------------------------------------------------------
**
** STEP: P10
**
*Step, name=P10, nlgeom=YES, inc=5000
*Static
0.01, 1., 1e-05, 0.05
**
** LOADS
**
** Name: P9   Type: Pressure
*Dsload, op=NEW
** Name: P10   Type: Pressure
*Dsload, op=NEW
BellowsInner, P, 0.01
**
** OUTPUT REQUESTS
**
*Restart, write, frequency=0
**
** FIELD OUTPUT: F-Output-1
**
*Output, field
*Node Output, variable=PRESELECT
*Element Output, directions=YES, variable=PRESELECT
**
** HISTORY OUTPUT: Internal energy
**
*Output, history
*Energy Output
ALLIE,
**
** HISTORY OUTPUT: DisplacementForce
**
*Node Output, nset=RF
RF2, U2
*End Step
